// COMSOL Multiphysics 5.5.0.359 model "Nerve_1_Fascicle_1_CUFF.mph"
// Outline of the model tree

Parameters
  Outer_D = 5[mm]  // Outer box diameter
  Nerve_D = 250[um]  // Nerve Diameter
  Fascicle_D = 200[um]  // Fascicle Diameter, in um
  Nerve_y_c = 0[um]  // Nerve yz-plane center of gravity, in um
  Nerve_z_c = 0[um]  // Nerve yz-plane center of gravity, in um
  Fascicle_y_c = 0[um]  // Fascicle zy-plane center of gravity, in um
  Fascicle_z_c = 0[um]  // Fascicle yz-plane center of gravity, in um
  Length = 5000[um]  // Nerve, Fascicle and axons length, in um
  CUFF_1_Insulator_length = 1000[um]  // LIFE electrode diameter, in um
  CUFF_1_Insulator_thickness = 20[um]  // LIFE electrode length, in um
  CUFF_1_contact_thickness = 5[um]  // LIFE electrode yz-plane center of gravity, in um
  CUFF_1_contact_width = 50[um]  // LIFE electrode yz-plane center of gravity, in um
  CUFF_1_x_offset = 2000[um]  // LIFE electrode shift from x = 0, in um
  Outer_conductivity = 0.1[S/m]  // Conductivity of the outer material, in S/m, isotropic
  Epineurium_conductivity = 0.085[S/m]  // Conductivity of the Epineurium, in S/m, isotrpic
  Endoneurium_conductivity_xx = 0.571[S/m]  // Conductivity of the Endoneurium along the x axis, in S/m
  Endoneurium_conductivity_yy = 0.085[S/m]  // Conductivity of the Endoneurium along the y axis, in S/m
  Endoneurium_conductivity_zz = 0.085[S/m]  // Conductivity of the Endoneurium along the y axis, in S/m
  Perineurium_thickness = 5[um]  // Thickness of the Periuneurium sheat
  Perineurium_conductivity = 0.002[S/m]  // Conductivity of the Perineurium, in S/m, isotropic
  LIFE_1_Istim = 1[mA]

Selections
  sel1: Explicit on no points

Geometry
  geom1 "Geometry 1" (3D, length unit m)
    cyl1: Cylinder "Outer_box" | pos = {0, Nerve_y_c, Nerve_z_c}; axistype = x; r = Outer_D/2; h = Length
    cyl2: Cylinder "Nerve" | pos = {0, Nerve_y_c, Nerve_z_c}; axistype = x; r = Nerve_D/2; h = Length
    cyl3: Cylinder "Fascicle" | axistype = x; r = Fascicle_D/2; h = Length
    cyl5: Cylinder "CUFF_contact"
      pos = {CUFF_1_x_offset + CUFF_1_Insulator_length/2 - CUFF_1_contact_width/2, Nerve_y_c, Nerve_z_c}
      axistype = x
      r = Nerve_D/2+CUFF_1_contact_thickness
      h = CUFF_1_contact_width
    dif1: Difference | input = cyl5; input2 = cyl2, cyl3; keep = on
    cyl4: Cylinder "CUFF_insulator"
      pos = {CUFF_1_x_offset, Nerve_y_c, Nerve_z_c}
      type = surface
      axistype = x
      r = Nerve_D/2+CUFF_1_Insulator_thickness
      h = CUFF_1_Insulator_length
    dif2: Difference "CUFF" (disabled) | input = cyl4; input2 = cyl2, cyl3, cyl5, dif1; keep = on
    fin: Finalize "Form Union"

Materials
  mat1: Common "Outer" on domains 1
    def "Basic"
      relpermittivity = 1
      electricconductivity = Outer_conductivity
  mat2: Common "Endoneurium" on domains 3, 6, 8
    def "Basic"
      relpermittivity = 1
      electricconductivity = diag{Endoneurium_conductivity_xx, Endoneurium_conductivity_yy, Endoneurium_conductivity_zz}
  mat3: Common "Epineurium" on domains 2, 5, 7
    def "Basic"
      relpermittivity = 1
      electricconductivity = Epineurium_conductivity
  mat4: Common "Silicone" on no domains
  mat5: Common "CUFF_conductor" on domains 4
    def "Basic"
      electricconductivity = 9.43E6
      relpermittivity = 1

Physics
  ec: ConductiveMedia "Electric Currents" on all domains
    dependent variable V
    cucn1: CurrentConservation (default)
    ein1: ElectricInsulation (default)
    init1: init "Initial Values 1" (default)
    ci1: ContactImpedance on boundaries 8, 9, 12, 13, 27, 28, 31, 32, 40, 41, 43, 44
      ds = Perineurium_thickness
      sigmabnd_mat = userdef
      sigmabnd = Perineurium_conductivity
      epsilonrbnd_mat = userdef
      epsilonrbnd = 1
    bcs1: BoundaryCurrentSource on no boundaries | Qjs = LIFE_1_Istim/(pi*LIFE_1_D*LIFE_1_Length)
    gnd1: Ground on boundaries 1-3, 10, 15, 46

Mesh
  mesh2 "Mesh"
    size: MeshSizeDefault "default_size" | hauto = 3
    ftet1: FreeTet "Nerve_mesh" on domains 2, 3, 5-8
      size1: Size on domains 2, 3, 5-8 | hauto = 3
    ftet2: FreeTet "Outer_mesh" on domains 1, 4
      size1: Size on domains 1, 4 | hauto = 6

Studies
  std1 "Study 1"
    param: Parametric "Parametric Sweep" | pname = LIFE_1_Istim; plistarr = {1}; punit = mA
    stat: Stationary | loadcase = Load case 1

Solver configurations
  sol1 "Solution 1" (study std1)
    v1: Variables "Dependent Variables 1"
    s1: Stationary "Stationary Solver 1"
      p1: Parametric | pname = LIFE_1_Istim; plistarr = {1}; punit = mA; pcontinuationmode = no
      fc1: FullyCoupled | linsolver = i1
      i1: Iterative | linsolver = cg
        mg1: Multigrid | prefun = amg

Datasets
  dset1: Solution | solution = sol1

Plots
  pg1: PlotGroup3D "Electric Potential (ec)" | data = dset1
    mslc1: Multislice | expr = V; unit = mV; xnumber = 0; znumber = 0

Exports
  img1: Image "Nerve_potential" | sourceobject = pg1; size = current; unit = px; width = 800; height = 600