// COMSOL Multiphysics 5.5.0.359 model "Nerve_1_Fascicle_2_LIFE.mph"
// Outline of the model tree

Parameters
  Outer_D = 5[mm]  // Outer box diameter
  Nerve_D = 250[um]  // Nerve Diameter
  Fascicle_D = 300[um]  // Fascicle Diameter, in um
  Nerve_y_c = 0[um]  // Nerve yz-plane center of gravity, in um
  Nerve_z_c = 0[um]  // Nerve yz-plane center of gravity, in um
  Fascicle_y_c = 0[um]  // Fascicle zy-plane center of gravity, in um
  Fascicle_z_c = 0[um]  // Fascicle yz-plane center of gravity, in um
  Length = 5000[um]  // Nerve, Fascicle and axons length, in um
  LIFE_1_D = 25[um]  // LIFE_1 electrode diameter, in um
  LIFE_1_Length = 1000[um]  // LIFE electrode length, in um
  LIFE_1_y_c = 75[um]  // LIFE electrode yz-plane center of gravity, in um
  LIFE_1_z_c = 0[um]  // LIFE electrode yz-plane center of gravity, in um
  LIFE_1_x_offset = 1000[um]  // LIFE electrode shift from x = 0, in um
  LIFE_1_Istim = 1[mA]
  Outer_conductivity = 0.1[S/m]  // Conductivity of the outer material, in S/m, isotropic
  Epineurium_conductivity = 0.085[S/m]  // Conductivity of the Epineurium, in S/m, isotrpic
  Endoneurium_conductivity_xx = 0.571[S/m]  // Conductivity of the Endoneurium along the x axis, in S/m
  Endoneurium_conductivity_yy = 0.085[S/m]  // Conductivity of the Endoneurium along the y axis, in S/m
  Endoneurium_conductivity_zz = 0.085[S/m]  // Conductivity of the Endoneurium along the y axis, in S/m
  Perineurium_thickness = 5[um]  // Thickness of the Periuneurium sheat
  Perineurium_conductivity = 0.002[S/m]  // Conductivity of the Perineurium, in S/m, isotropic
  LIFE_2_D = 25[um]
  LIFE_2_Length = 1000[um]
  LIFE_2_y_c = -75[um]
  LIFE_2_z_c = 0[um]
  LIFE_2_x_offset = 3000[um]
  LIFE_2_Istim = 1[mA]

Selections
  sel1: Explicit on no points

Geometry
  geom1 "Geometry 1" (3D, length unit m)
    cyl1: Cylinder "Outer_box" | pos = {0, Nerve_y_c, Nerve_z_c}; axistype = x; r = Outer_D/2; h = Length
    cyl2: Cylinder "Nerve" | pos = {0, Nerve_y_c, Nerve_z_c}; axistype = x; r = Nerve_D/2; h = Length
    cyl3: Cylinder "Fascicle" | axistype = x; r = Fascicle_D/2; h = Length
    cyl4: Cylinder "LIFE_1"
      pos = {LIFE_1_x_offset, LIFE_1_y_c, LIFE_1_z_c}
      type = surface
      axistype = x
      r = LIFE_1_D/2
      h = LIFE_1_Length
    dif1: Difference | input = cyl3; input2 = cyl4
    cyl5: Cylinder "LIFE_2"
      pos = {LIFE_2_x_offset, LIFE_2_y_c, LIFE_2_z_c}
      type = surface
      axistype = x
      r = LIFE_2_D/2
      h = LIFE_2_Length
    dif2: Difference | input = dif1; input2 = cyl5
    fin: Finalize "Form Union"

Materials
  mat1: Common "Outer" on domains 1
    def "Basic"
      relpermittivity = 1
      electricconductivity = Outer_conductivity
  mat2: Common "Endoneurium" on domains 2
    def "Basic"
      relpermittivity = 1
      electricconductivity = diag{Endoneurium_conductivity_xx, Endoneurium_conductivity_yy, Endoneurium_conductivity_zz}
  mat3: Common "Epineurium" on domains 3
    def "Basic"
      relpermittivity = 1
      electricconductivity = Epineurium_conductivity

Physics
  ec: ConductiveMedia "Electric Currents" on all domains
    dependent variable V
    cucn1: CurrentConservation (default)
    ein1: ElectricInsulation (default)
    init1: init "Initial Values 1" (default)
    ci1: ContactImpedance on boundaries 5, 6, 11, 14
      ds = Perineurium_thickness
      sigmabnd_mat = userdef
      sigmabnd = Perineurium_conductivity
      epsilonrbnd_mat = userdef
      epsilonrbnd = 1
    bcs1: BoundaryCurrentSource on boundaries 16-19 | Qjs = LIFE_1_Istim/(pi*LIFE_1_D*LIFE_1_Length)
    bcs2: BoundaryCurrentSource on boundaries 20-23 | Qjs = LIFE_2_Istim/(pi*LIFE_2_D*LIFE_2_Length)
    gnd1: Ground on boundaries 2, 3, 7, 10, 15, 26

Mesh
  mesh2 "Mesh"
    size: MeshSizeDefault "default_size" | hauto = 3
    ftet1: FreeTet "Nerve_mesh" on domains 2, 3
      size1: Size on domains 2, 3 | hauto = 3
    ftet2: FreeTet "Outer_mesh" on domains 1
      size1: Size on domains 1 | hauto = 6

Studies
  std1 "Study 1"
    param: Parametric "Parametric Sweep"
      pname = {LIFE_1_Istim, LIFE_2_Istim}
      plistarr = {{1,0}, {0,1}}
      punit = {mA, mA}
    stat: Stationary | loadcase = Load case 1

Solver configurations
  sol1 "Solution 1" (study std1)
    v1: Variables "Dependent Variables 1"
    s1: Stationary "Stationary Solver 1"
      p1: Parametric
        pname = {LIFE_1_Istim, LIFE_2_Istim}
        plistarr = {{1,0}, {0,1}}
        punit = {mA, mA}
        pcontinuationmode = no
      fc1: FullyCoupled | linsolver = i1
      i1: Iterative | linsolver = cg
        mg1: Multigrid | prefun = amg

Datasets
  dset1: Solution | solution = sol1

Plots
  pg1: PlotGroup3D "Electric Potential (ec)" | data = dset1
    mslc1: Multislice | data = dset1; expr = V; unit = mV; xnumber = 0; znumber = 0

Exports
  img1: Image "Nerve_potential" | sourceobject = pg1; size = current; unit = px; width = 800; height = 600